// COMSOL Multiphysics 6.0.0.405 model "montmorillonite_bsm.mph"
// Outline of the model tree

Parameters
  ind = 30
  e = 1.6e-19
  c0 = 1e-3
  C0 = c0*1000*NA
  eps0 = 8.85e-12
  epsr = 80
  kB = 1.38065e-23
  T = 293
  kappa = sqrt(2*C0*e^2/(eps0*epsr*kB*T))
  d = 5
  dx = d/kappa
  xb = 1e-9
  Q0 = -0.1-0.05*1/29*(ind-1)
  GammaS = -Q0/e
  KNa = 10^(0.88)
  NA = 6.022e23
  f = 10^(-(sqrt(c0)/(1+sqrt(c0)-0.3*c0))/2)
  a = c0*f
  C1 = eps0*epsr/xb

Geometry
  geom1 "Geometrie 1" (1D, length unit m)
    i1: Interval "Intervall 1" | coord = {0, xb}
    i2: Interval "Intervall 2" | coord = {xb, xb+dx}
    fin: Finalize "Vereinigung bilden"

Physics
  c: CoefficientFormPDE "PDE, Koeffizientenform" on domains 2
    dependent variable u
    cfeq1: CoefficientFormPDE "PDE, Koeffizientenform 1" (default)
      c = 1
      a = 0
      f = -e*C0/eps0/epsr*(exp(e*u/kB/T)-exp(-e*u/kB/T))
      da = 0
    zflx1: ZeroFluxBoundary "Kein Fluss 1" (default)
    init1: init "Anfangswerte 1" (default)
    cfeq2: CoefficientFormPDE "PDE, Koeffizientenform 2" (disabled) on all domains | c = 1; a = kappa^2; f = 0; da = 0
    flux1: FluxBoundary "Fluss/Quelle 1" (disabled) on boundaries 1 | g = -Q0/(eps0*epsr)
    flux2: FluxBoundary "Fluss/Quelle 2" (disabled) on boundaries 1, 2
      g = Q0/eps0/epsr+e/(eps0*epsr)*GammaS/(1+KNa*a*exp(-e*u/(kB*T)))*KNa*a*exp(-e*u/(kB*T))
    flux3: FluxBoundary "Fluss/Quelle 3" (disabled) on boundaries 1, 2
      g = Q0/eps0/epsr-KNa*a*exp(-e*u/(kB*T))/(1+KNa*a*exp(-e*u/(kB*T)))*Q0/eps0/epsr
    dir1: DirichletBoundary "Dirichlet-Randbedingung 1" on boundaries 3 | r = 0
    flux4: FluxBoundary "Fluss/Quelle 4" on boundaries 1, 2
      g = +Q0/eps0/epsr-(KNa*a*exp(-e*u/(kB*T)))/(1+KNa*a*exp(-e*u/(kB*T)))*Q0/eps0/epsr
  c2: CoefficientFormPDE "PDE, Koeffizientenform 2" on domains 1
    dependent variable u2
    cfeq1: CoefficientFormPDE "PDE, Koeffizientenform 1" (default) | c = 1; f = 0; da = 0
    zflx1: ZeroFluxBoundary "Kein Fluss 1" (default)
    init1: init "Anfangswerte 1" (default)
    dir1: DirichletBoundary "Dirichlet-Randbedingung 1" on boundaries 2 | r = u
    flux1: FluxBoundary "Fluss/Quelle 1" on boundaries 1 | g = Q0/(eps0*epsr)

Mesh
  mesh1 "Netz 1" (physics-controlled)
    size: MeshSizeDefault "Größe" | hauto = 1

Studies
  std1 "Studie 1"
    param: Parametric "Parametrischer Sweep" | pname = c0; plistarr = 10^{range(-3,0.0689655172414,-1)}
    stat: Stationary "Stationär"

Solver configurations
  sol1 "Lösung 1" (study std1)
    v1: Variables "Abhängige Variablen 1"
    s1: Stationary "Stationärer Löser 1"
      dDef: Direct "Direkt"
      fc1: FullyCoupled "Vollständig gekoppelt 1" | linsolver = dDef
  sol2 "Parametrische Lösungen 1" (study std1)
  sol23 "Parametrische Lösungen 2" (study std1)

Datasets
  dset1: Solution | solution = sol1
  dset2: Solution | solution = sol2
  dset3: Solution | solution = sol23

Derived values
  pev1: EvalPoint "Punktauswertung 1" on boundaries 2
    data = dset3
    table = tbl3
    expr = {u, -KNa*a*exp(-e*u/(kB*T))/(1+KNa*a*exp(-e*u/(kB*T)))*Q0, KNa*a*exp(-e*u/(kB*T))/(1+KNa*a*exp(-e*u/(kB*T))), }
    descr = {phib, Qb, fQ, }

Tables
  tbl1: Table "Tabelle 1"
    // Punktauswertung 1
  tbl2: Table "Tabelle 2"
    // Punktauswertung 1
    phib (1), Punkt: 2 | Qb, Punkt: 2 | fQ, Punkt: 2
    -0.0467475 | 0.110984 | 0.742205

Plots
  pg4: PlotGroup1D "1D-Plotgruppe 4" | data = none
    tblp1: Table "Tabellengraph 1" | table = tbl1
  pg5: PlotGroup1D "1D-Plotgruppe 5" | data = dset1
    lngr1: LineGraph "Liniengraph 1" on all domains | expr = u; xdata = expr; xdataexpr = x
  pg6: PlotGroup1D "1D-Plotgruppe 6" | data = dset1
    lngr1: LineGraph "Liniengraph 1" on all domains | expr = u2; xdata = expr; xdataexpr = x
  pg7: PlotGroup1D "1D-Plotgruppe 7" | data = dset2
    lngr1: LineGraph "Liniengraph 1" on all domains | expr = u; xdata = expr; xdataexpr = x
  pg8: PlotGroup1D "1D-Plotgruppe 8" | data = dset2
    lngr1: LineGraph "Liniengraph 1" on all domains | expr = u2; xdata = expr; xdataexpr = x
  pg9: PlotGroup1D "1D-Plotgruppe 9" | data = dset3
    lngr1: LineGraph "Liniengraph 1" on all domains | expr = u; xdata = expr; xdataexpr = x
  pg10: PlotGroup1D "1D-Plotgruppe 10" | data = dset3
    lngr1: LineGraph "Liniengraph 1" on all domains | expr = u2; xdata = expr; xdataexpr = x
  pg11: PlotGroup1D "1D-Plotgruppe 11" | data = none
    tblp1: Table "Tabellengraph 1" | table = tbl3; plotcolumninput = manual