// COMSOL Multiphysics 6.0.0.405 model "quartz_bsm.mph"
// Outline of the model tree

Parameters
  ind = 30
  e = 1.6e-19  // Electron charge
  eps0 = 8.85e-12  // Vacuum permittivity
  epsr = 80  // Relative bulk permittivity
  kB = 1.38065e-23  // Boltzmann constant
  NA = 6.022e23  // Avogadro constant
  T = 293  // Temperature
  C0 = c0*1000*NA  // NaCl ion density
  kappa = sqrt(2*C0*e^2/(eps0*epsr*kB*T))  // Inverse Debye length
  d = 5  // Number of Debye lengths
  dx = d/kappa  // Distance of outer boundary
  Gs = 4.6e18  // Surface sites per square meter
  c0 = 1e-3  // NaCl bulk concentration
  KNa = 10^(0.58)  // Na equilibrium constant
  pH = 5-4/29+4/29*ind  // pH value
  cH = 10^(-pH)  // Proton activity
  K2 = 10^(7.28)  // Equilibrium constant of proton reaction
  C1 = 3.43  // Capacitance between 0- and beta-plane
  xb = eps0*epsr/C1  // Position of beta plane
  I = c0+cH/2  // Ionic strength
  f = 10^(-(sqrt(I)/(1+sqrt(I)-0.3*I))/2)  // Activity coefficitent
  aNa = c0*f  // Na activity
  aH = cH*f  // H activity

Variables
  var1 "Variablen 1"

Geometry
  geom1 "Geometrie 1" (1D, length unit m)
    i1: Interval "Intervall 1" | coord = {0, xb}
    i2: Interval "Intervall 2" | coord = {xb, xb+dx}
    fin: Finalize "Vereinigung bilden"

Physics
  c: CoefficientFormPDE "PDE, Koeffizientenform" on domains 2
    dependent variable u
    cfeq1: CoefficientFormPDE "PDE, Koeffizientenform 1" (default)
      c = 1
      a = 0
      f = -e*1000*NA/eps0/epsr*(c0*exp(e*u/kB/T)-c0*exp(-e*u/kB/T))
      da = 0
    zflx1: ZeroFluxBoundary "Kein Fluss 1" (default)
    init1: init "Anfangswerte 1" (default)
    flux3: FluxBoundary "Fluss/Quelle 3" on boundaries 1, 2
      g = -e*Gs/(1+K2*aH*exp(-e*phi0/kB/T)+KNa*aNa*exp(-e*u2/kB/T))/eps0/epsr
    dir1: DirichletBoundary "Dirichlet-Randbedingung 1" on boundaries 3 | r = 0
  c2: CoefficientFormPDE "PDE, Koeffizientenform 2" on domains 1
    dependent variable u2
    cfeq1: CoefficientFormPDE "PDE, Koeffizientenform 1" (default) | c = 1; f = 0; da = 0
    zflx1: ZeroFluxBoundary "Kein Fluss 1" (default)
    init1: init "Anfangswerte 1" (default)
    dir1: DirichletBoundary "Dirichlet-Randbedingung 1" on boundaries 2 | r = u
    flux1: FluxBoundary "Fluss/Quelle 1" on boundaries 1
      g = -e*Gs/(1+K2*aH*exp(-e*u2/kB/T)+KNa*aNa*exp(-e*phib/kB/T))*(1+KNa*aNa*exp(-e*phib/kB/T))/eps0/epsr
  c3: CoefficientFormPDE "PDE, Koeffizientenform 3" on domains 1
    dependent variable phi0
    cfeq1: CoefficientFormPDE "PDE, Koeffizientenform 1" (default) | c = 0; f = 0; da = 0; be = 1
    zflx1: ZeroFluxBoundary "Kein Fluss 1" (default)
    init1: init "Anfangswerte 1" (default)
    dir1: DirichletBoundary "Dirichlet-Randbedingung 1" on boundaries 1 | r = u2
  c4: CoefficientFormPDE "PDE, Koeffizientenform 4" on all domains
    dependent variable phib
    cfeq1: CoefficientFormPDE "PDE, Koeffizientenform 1" (default) | c = 0; f = 0; da = 0; be = 1
    zflx1: ZeroFluxBoundary "Kein Fluss 1" (default)
    init1: init "Anfangswerte 1" (default)
    dir1: DirichletBoundary "Dirichlet-Randbedingung 1" on boundaries 2 | r = u2

Mesh
  mesh1 "Netz 1" (physics-controlled)
    size: MeshSizeDefault "Größe" | hauto = 1

Studies
  std1 "Studie 1"
    param: Parametric "Parametrischer Sweep pH" | pname = pH; plistarr = range(5,0.1,9)
    param1: Parametric "Parametrischer Sweep c0" (disabled)
      pname = c0
      plistarr = 10^{range(log10(1.0e-4),1/10,log10(0.1))}
    stat: Stationary "Stationär" | useparam = on

Solver configurations
  sol1 "Lösung 1" (study std1)
    v1: Variables "Abhängige Variablen 1"
    s1: Stationary "Stationärer Löser 1"
      dDef: Direct "Direkt"
      fc1: FullyCoupled "Vollständig gekoppelt 1" | linsolver = dDef; dtech = hnlin
  sol2 "Parametrische Lösungen 1" (study std1)
  sol54 "Parametrische Lösungen 2" (study std1)

Datasets
  dset1: Solution | solution = sol1
  dset2: Solution | solution = sol2
  dset3: Solution | solution = sol54

Derived values
  pev1: EvalPoint "Punktauswertung 1" on boundaries 2
    data = dset3
    table = tbl3
    expr = {u, e*Gs/(1+K2*aH*exp(-e*phi0/kB/T)+KNa*aNa*exp(-e*phib/kB/T))*KNa*aNa*exp(-e*phib/kB/T), (e*Gs/(1+K2*aH*exp(-e*phi0/kB/T)+KNa*aNa*exp(-e*phib/kB/T))*KNa*aNa*exp(-e*phib/kB/T))/(e*Gs/(1+K2*aH*exp(-e*phi0/kB/T)+KNa*aNa*exp(-e*phib/kB/T))*(1+KNa*aNa*exp(-e*phib/kB/T)))}
    unit = {1, , }
    descr = {zeta, SigS, fQ}

Tables
  tbl3: Table "Tabelle 3"
    // Punktauswertung 1
    pH | zeta (1), Punkt: 2 | SigS, Punkt: 2 | fQ, Punkt: 2
    5 | -0.0218141 | 1.43729e-05 | 0.00862138
    5.1 | -0.0244649 | 1.80433e-05 | 0.00956543
    5.2 | -0.0272499 | 2.2646e-05 | 0.0106676
    5.3 | -0.030156 | 2.84162e-05 | 0.0119516
    5.4 | -0.0331724 | 3.56478e-05 | 0.0134457
    5.5 | -0.036285 | 4.47083e-05 | 0.0151806
    5.6 | -0.0394827 | 5.60559e-05 | 0.0171922
    5.7 | -0.0427558 | 7.02627e-05 | 0.019522
    5.8 | -0.0460932 | 8.80413e-05 | 0.0222157
    5.9 | -0.0494862 | 0.000110279 | 0.0253256
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
Plots
  pg4: PlotGroup1D "1D-Plotgruppe 4" | data = none
    tblp1: Table "Tabellengraph 1" | table = tbl2; xaxisdata = auto; plotcolumninput = manual
  pg5: PlotGroup1D "1D-Plotgruppe 5" | data = dset1
    lngr1: LineGraph "Liniengraph 1" on all domains | expr = if(dom==1,u2,u); xdata = expr; xdataexpr = x
  pg6: PlotGroup1D "1D-Plotgruppe 6" | data = dset1
    lngr1: LineGraph "Liniengraph 1" on all domains | expr = u2; xdata = expr; xdataexpr = x
  pg9: PlotGroup1D "1D-Plotgruppe 9" | data = none
    tblp1: Table "Partition coefficient" | table = tbl2; xaxisdata = auto; plotcolumninput = manual
  pg10: PlotGroup1D "1D-Plotgruppe 10" | data = dset2
    lngr1: LineGraph "Liniengraph 1" on all domains | expr = u; xdata = expr; xdataexpr = x
  pg11: PlotGroup1D "1D-Plotgruppe 11" | data = dset2
    lngr1: LineGraph "Liniengraph 1" on all domains | expr = u2; xdata = expr; xdataexpr = x
  pg12: PlotGroup1D "1D-Plotgruppe 12" | data = dset2
    lngr1: LineGraph "Liniengraph 1" on all domains | expr = phi0; xdata = expr; xdataexpr = x
  pg13: PlotGroup1D "1D-Plotgruppe 13" | data = dset2
    lngr1: LineGraph "Liniengraph 1" on all domains | expr = phib; xdata = expr; xdataexpr = x
  pg15: PlotGroup1D "1D-Plotgruppe 15" | data = dset3
    lngr1: LineGraph "Liniengraph 1" on all domains | expr = u; xdata = expr; xdataexpr = x
  pg16: PlotGroup1D "1D-Plotgruppe 16" | data = dset3
    lngr1: LineGraph "Liniengraph 1" on all domains | expr = u2; xdata = expr; xdataexpr = x
  pg17: PlotGroup1D "1D-Plotgruppe 17" | data = dset3
    lngr1: LineGraph "Liniengraph 1" on all domains | expr = phi0; xdata = expr; xdataexpr = x
  pg18: PlotGroup1D "1D-Plotgruppe 18" | data = dset3
    lngr1: LineGraph "Liniengraph 1" on all domains | expr = phib; xdata = expr; xdataexpr = x
  pg19: PlotGroup1D "1D-Plotgruppe 19" (disabled) | data = none
    tblp1: Table "Tabellengraph 1" | source = evaluationgroup; table = none
  pg20: PlotGroup1D "1D-Plotgruppe 20" | data = none
    tblp1: Table "Tabellengraph 1" | table = tbl3

Exports
  data1: Data "Daten 1"
    data = dset1
    expr = {u2, u}
    filename = C:\Users\denni\OneDrive\Dokumente\Projekte\surface_complexation\test.txt